** written by FreeCAD inp file writer for CalculiX,Abaqus meshes
** highest dimension mesh elements only.

** Nodes
*Node, NSET=Nall
1, 0, 0, 0
2, 0, 0, 10
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

** Volume elements
*Element, TYPE=C3D10, ELSET=Evolumes
1, 95, 98, 47, 196, 103, 197, 198, 200, 199, 201
2, 147, 121, 145, 196, 203, 202, 161, 205, 204, 206
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
** Define element set Eall
*ELSET, ELSET=Eall
Evolumes


***********************************************************
** Element sets for materials and FEM element type (solid, shell, beam, fluid)
*ELSET,ELSET=MechanicalMaterialSolid
Evolumes

***********************************************************
** constraints fixed node sets
** FemConstraintFixed
*NSET,NSET=FemConstraintFixed
1,
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
** Physical constants for SI(mm) unit system with Kelvins
*PHYSICAL CONSTANTS, ABSOLUTE ZERO=0, STEFAN BOLTZMANN=5.670374419e-11

***********************************************************
** Materials
** see information about units at file end
** FreeCAD material name: Steel-Generic
** MechanicalMaterial
*MATERIAL, NAME=MechanicalMaterial
*ELASTIC
200000,0.3
*EXPANSION, ZERO=0
0

***********************************************************
** Sections
*SOLID SECTION, ELSET=MechanicalMaterialSolid, MATERIAL=MechanicalMaterial

***********************************************************
** At least one step is needed to run an CalculiX analysis of FreeCAD
*STEP, INC=2000
*STATIC


***********************************************************
** Fixed Constraints
** FemConstraintFixed
*BOUNDARY
FemConstraintFixed,1
FemConstraintFixed,2
FemConstraintFixed,3


***********************************************************
** constraints force node loads
** FemConstraintForce
*CLOAD
** node loads on shape: Box:Face6
2,3,-0
4,3,-0
6,3,-0
8,3,-0
18,3,-0
19,3,-833.3333333333
20,3,-833.3333333333
30,3,-0
31,3,-833.3333333333
32,3,-833.3333333333
36,3,-0
37,3,-833.3333333333
38,3,-833.3333333333
42,3,-0
43,3,-833.3333333333
44,3,-833.3333333333
170,3,-0
171,3,-0
172,3,-0
173,3,-0
174,3,-0
175,3,-1666.666666667
176,3,-1666.666666667
177,3,-1666.666666667
178,3,-1666.666666667
179,3,-1666.666666667
180,3,-1666.666666667
181,3,-1666.666666667
182,3,-1666.666666667
183,3,-1666.666666667
184,3,-1666.666666667
185,3,-1666.666666667
186,3,-1666.666666667
187,3,-1666.666666667
188,3,-1666.666666667
189,3,-1666.666666667
190,3,-1666.666666667
191,3,-1666.666666667
192,3,-1666.666666667
193,3,-1666.666666667
194,3,-1666.666666667


***********************************************************
** constraints pressure element face loads
** FemConstraintPressure
*DLOAD
** Box.Face2
3,P1,1000.0
6,P3,1000.0
9,P2,1000.0
36,P1,1000.0
38,P1,1000.0
56,P1,1000.0
61,P3,1000.0
67,P2,1000.0
68,P3,1000.0
75,P2,1000.0
76,P4,1000.0
78,P4,1000.0
79,P2,1000.0
90,P3,1000.0
105,P3,1000.0
125,P3,1000.0

***********************************************************
** Outputs --> frd file
*NODE FILE
U
*EL FILE, GLOBAL=NO
S, E
** outputs --> dat file
** reaction forces for Constraint fixed
*NODE PRINT, NSET=FemConstraintFixed, TOTALS=ONLY
RF

*OUTPUT, FREQUENCY=1
***********************************************************
*END STEP

***********************************************************
** CalculiX Input file
**   written by    --> FreeCAD 0.21.0
**   written on    --> Tue Mar 28 06:53:21 2023
**   file name     --> box_static.FCStd
**   analysis name --> Analysis
**
**
***********************************************************
**  About units:
**  See ccx manual, ccx does not know about any unit.
**  Golden rule: The user must make sure that the numbers they provide have consistent units.
**  The user is the FreeCAD calculix writer module ;-)
**
**  The unit system which is used at Guido Dhondt's company: mm, N, s, K
**  Since Length and Mass are connected by Force, if Length is mm the Mass is in t to get N
**  The following units are used to write to inp file:
**
**  Length: mm (this includes the mesh geometry)
**  Mass: t
**  TimeSpan: s
**  Temperature: K
**
**  This leads to:
**  Force: N
**  Pressure: N/mm^2 == MPa (Young's Modulus has unit Pressure)
**  Density: t/mm^3
**  Gravity: mm/s^2
**  Thermal conductivity: t*mm/K/s^3 == as W/m/K == kW/mm/K
**  Specific Heat: mm^2/s^2/K = J/kg/K == kJ/t/K
**
